*Heading
** Job name: Pole-Door_NoInt_t0-01 Model name: No Int Beam
*Preprint, echo=NO, model=NO, history=NO, contact=NO
**
** PARTS
**
*Part, name=Door
*Node
      1,        -950.,         580.,         260.
      2,        -930.,         580.,         260.
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*Element, type=S4R
  1, 104, 107, 108, 103
  2, 103, 108,  47,  48
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*Element, type=S3R
201, 285, 353, 284
202, 354, 281, 282
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*Elset, elset=_PickedSet2, internal
    1,    2,    3,    4,    5,    6
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** Region: (ShellSection:Picked), (Controls:EC-1)
*Elset, elset=_PickedSet2, internal
    1,    2,    3,    4,    5,    6
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** Section: ShellSection
*Shell Section, elset=_PickedSet2, controls=EC-1, material=Steel
1., 5
*End Part
**
*Part, name=Pole
*End Part
**
**
** ASSEMBLY
**
*Assembly, name=Assembly
**
*Instance, name=Door-1, part=Door
*End Instance
**
*Instance, name=Pole-1, part=Pole
-555.087449017712, 1159.99999999997, 524.999999999845
-555.087449017712, 1159.99999999997, 524.999999999845, -554.087449017712, 1160.00000014358, 524.999999640815, 89.9999990194288
*Node
      1,   -86.706337,  -49.8197899,        1200.
      2,   -86.706337,  -49.8197899,           0.
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*Element, type=R3D4
  1,   1,   7, 129, 108
  2,   7,   8, 130, 129
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*Node
    969,           0.,  -6.12303177e-15,        1200.
*Nset, nset=Pole-1-RefPt_, internal
969,
*Nset, nset=_PickedSet3, internal
 969,
*Elset, elset=Pole-1, generate
   1,  946,    1
*Element, type=MASS, elset=_PickedSet3_PointMass_
947, 969
*Mass, elset=_PickedSet3_PointMass_
1.,
*End Instance
**
*Nset, nset=PoleBC, instance=Pole-1
 969,
*Elset, elset=AUTO1, instance=Door-1
    1,    2,    3,    4,    5,    6
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*Nset, nset=_PickedSet11, internal, instance=Door-1, generate
    1,  5120,     1
*Rigid Body, ref node=Pole-1.Pole-1-RefPt_, elset=Pole-1.Pole-1
*End Assembly
**
** ELEMENT CONTROLS
**
*Section Controls, name=EC-1, DISTORTION CONTROL=NO, hourglass=STIFFNESS
1., 1., 1.
**
** MATERIALS
**
*Material, name=Steel, rtol=0.3
*Density
 7.8e-09,
*Elastic
210000., 0.3
*Plastic
 650.597,          0.
 660.465, 5.62861e-05
 670.352, 0.000107624
 680.472, 0.000153637
 690.608, 0.000208394
 700.193, 0.000254021
 710.179,  0.00030687
  720.11, 0.000360097
 730.302, 0.000414462
 740.837, 0.000478327
 750.226, 0.000532685
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 1016.52,   0.0576489
**
** INTERACTION PROPERTIES
**
*Surface Interaction, name=NoFric
*Friction
0.,
**
** PREDEFINED FIELDS
**
** Name: DoorVel   Type: Velocity
*Initial Conditions, type=VELOCITY
_PickedSet11, 1, 0.
_PickedSet11, 2, 0.
_PickedSet11, 3, 16670.
** ----------------------------------------------------------------
**
** STEP: Step-1
**
*Step, name=Step-1
*Dynamic, Explicit
, 0.01
*Bulk Viscosity
0.06, 1.2
**
** BOUNDARY CONDITIONS
**
** Name: PoleBC Type: Symmetry/Antisymmetry/Encastre
*Boundary
PoleBC, ENCASTRE
**
** INTERACTIONS
**
** Interaction: Pole-Door
*Contact, op=NEW
*Contact Inclusions, ALL EXTERIOR
*Contact property assignment
 ,  , NoFric
**
** OUTPUT REQUESTS
**
*Restart, write, number interval=1, time marks=NO
**
** FIELD OUTPUT: F-Output-1
**
*Output, field, variable=PRESELECT
**
** HISTORY OUTPUT: H-Output-1
**
*Output, history, variable=PRESELECT
*End Step
