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/batch
! ANSYS input file written by Workbench version 11.0
! File used for geometry attach: OscillatingPlate.agdb
/com,--- Data in consistent MKS units.
/units,MKS
/track,-1
/prep7
! Turn off shape checking because checks already performed inside WB mesher.
! See help system for more information.
SHPP,OFF,,NOWARN
etcon,set             ! allow ANSYS to choose best KEYOP's for 180x elements
/com,*********** Nodes for the whole assembly ***********
nblock,3
(1i8,3e20.9e3)
       1    1.387778781E-017    1.000000000E+000    4.000000000E-001
       2    6.000000000E-002    1.000000000E+000    4.000000000E-001
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! end of nblock command
/com,*********** Elements for Part 1 ***********
et,1,185
eblock,10
(15i8)
       1       1       1       1       0     105     102       9       9       1       1       1       1
       2       1       1       1       0     224     101      40      40       3       3       3       3
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-1
/com,*********** Send Materials ***********
MP,DENS,1,2550.,	! kg/m³
MP,NUXY,1,0.35,
MP,EX,1,2500000.,	! Pa
MP,ALPX,1,0.,	! 1/°C
MP,C,1,0.,	! J/kg·°C
MP,KXX,1,0.,	! W/m·°C
MP,MURX,1,0.,
MP,RSVX,1,0.,	! Ohm·m

/com,*********** Fixed Supports ***********
CMBLOCK,FIXEDSU ,NODE,      22
(8i10)
         3         4         7         8        40        72        87        88
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cmsel,s,FIXEDSU
d,all,all
nsel,all
nsel,all
/com,*********** Define Pressure Using Surface Effect Elements ***********
et,2,154
eblock,10
(15i8)
    1775       2       2       2       0     308     251     236     236
    1776       2       2       2       0     264     310     308     308
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-1
esel,s,type,,2
esel,all

*DIM,_loadvari28,TABLE,3,1,1,TIME
! Time values
_loadvari28(1,0) = 0.499
_loadvari28(2,0) = 0.5
_loadvari28(3,0) = 5.
! Load values
_loadvari28(1,1) = 100.
_loadvari28(2,1) = 0.
_loadvari28(3,1) = 0.
/com,*********** Create FSIFlag for CFX ***********
CMBLOCK,FSIN_1  ,NODE,     332
(8i10)
         1         2         3         4         5         6         7         8
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SF,FSIN_1,FSIN,1
nsel,all
/com,*********** Set Reference Temperature ***********
tref,22.
fini
/com,****************************************************************************
/com,*************************    SOLUTION       ********************************
/com,****************************************************************************
/solu
antype,4                   ! transient analysis
nlgeom,on                  ! Turn on Large Deformation Effects
solc,on,on                 ! Turn on solution control with ability to use contact time prediction
kbc,1                      ! stepped BC's
eqsl,pcg,1e-8,,,,,,1
resc,,none                 ! Do not keep any restart files
cntr,print,1               ! print out contact info and also make no initial contact an error
trnopt,full,,,,,hht        ! HHT time integration method
tintp,0.1	! Numerical Damping
nldiag,cont,iter           ! print out contact info each equilibrium iteration
/com,****************************************************
/com,******************* SOLVE FOR LS 1 ****************
esel,s,type,,2
nsle
sf,all,pres,%_loadvari28%
nsel,all
esel,all
autots,off                 ! User turned off automatic time stepping
deltim,0.1,0.1,0.1
time,5.
timint,on                  ! Turn on time integration effects
outres,erase
outres,all,none
outres,nsol,all
outres,rsol,all
outres,nload,all
outres,strs,all
outres,epel,all
outres,eppl,all
outres,v,all
outres,a,all
! *********** WB SOLVE COMMAND ***********
/eof
solve
/com,****************************************************
/com,*************** FINISHED SOLVE FOR LS 1 *************
*set,_DS_PROGRESS          ! turn off progress updates to avoid virus scanning bug
*get,_PCGITER,active,,solu,cgiter
/post1
fini
